*Heading
** Job name: Job-1 Model name: Model-1
** Generated by: Abaqus/CAE 2020
*Preprint, echo=NO, model=NO, history=NO, contact=NO
** ----------------------------------------------------------------
**
** PART INSTANCE: Part-1-1
**
*Node
      1,  0.707106769,  0.707106769
      2,           5.,           5.
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*Element, type=CPS4
  1,   1,  10, 183,  75
  2,  10,  11, 184, 183
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*Nset, nset=Part-1-1_Set-1, generate
    1,  1125,     1
*Elset, elset=Part-1-1_Set-1, generate
    1,  1080,     1
*Nset, nset=Part-1-1_left
   3,   8, 153, 154, 155, 156, 157, 158, 159, 160, 161, 162
*Nset, nset=Part-1-1_left_bottom
 8,
*Elset, elset=_Part-1-1_right_S4, generate
 265,  529,   24
*Surface, type=ELEMENT, name=Part-1-1_right
_Part-1-1_right_S4, S4
** Section: Section-1
*Solid Section, elset=Part-1-1_Set-1, material=Material-1
1.,
*System
**
** MATERIALS
**
*Material, name=Material-1
*Elastic
207000., 0.312
** ----------------------------------------------------------------
**
** STEP: Step-1
**
*Step, name=Step-1, nlgeom=NO
*Static
1., 1., 1e-05, 1.
**
** BOUNDARY CONDITIONS
**
** Name: BC-1 Type: Symmetry/Antisymmetry/Encastre
*Boundary
Part-1-1_left, PINNED
**
** LOADS
**
** Name: Load-1   Type: Pressure
*Dsload
Part-1-1_right, P, -100.
**
** OUTPUT REQUESTS
**
*Restart, write, frequency=0
**
** FIELD OUTPUT: F-Output-1
**
*Output, field
*Node Output
CF, RF, U
*Element Output, directions=YES
MISES, S
**
** HISTORY OUTPUT: H-Output-1
**
*Output, history
*Node Output, nset=Part-1-1_Set-1
CF1, CF2, CF3, CM1, CM2, CM3, RF1, RF2
RF3, RM1, RM2, RM3
*Element Output, elset=Part-1-1_Set-1
BIMOM, SF1, SF2, SF3, SM1, SM2, SM3
*End Step
