*Heading
** Job name: Job-1 Model name: Model-1
** Generated by: Abaqus/CAE 2020
*Preprint, echo=NO, model=NO, history=NO, contact=NO
** ----------------------------------------------------------------
**
** PART INSTANCE: Part-1-1
**
*Node
      1,           5.,           5.,         100.
      2,           5.,          2.5,         100.
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*Element, type=C3D8
  1, 106, 107, 112, 111,   1,   2,   7,   6
  2, 107, 108, 113, 112,   2,   3,   8,   7
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*Nset, nset=Part-1-1_Set-2, generate
   1,  525,    1
*Elset, elset=Part-1-1_Set-2, generate
   1,  320,    1
** Section: Section-1
*Solid Section, elset=Part-1-1_Set-2, material=Material-1
,
*System
*Nset, nset=left
   1,   2,   3,   4,   5, 106
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*Nset, nset=right
 101, 102, 103, 104, 105, 206
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**
** MATERIALS
**
*Material, name=Material-1
*Elastic
210000., 0.3
** ----------------------------------------------------------------
**
** STEP: Step-1
**
*Step, name=Step-1, nlgeom=NO
*Static
1., 1., 1e-05, 1.
**
** BOUNDARY CONDITIONS
**
** Name: BC-1 Type: Symmetry/Antisymmetry/Encastre
*Boundary
left, PINNED
**
** LOADS
**
** Name: Load-1   Type: Concentrated force
*Cload
right, 2, -40.
**
** OUTPUT REQUESTS
**
*Restart, write, frequency=0
**
** FIELD OUTPUT: F-Output-1
**
*Output, field, variable=PRESELECT
**
** HISTORY OUTPUT: H-Output-1
**
*Output, history, variable=PRESELECT
*End Step
